Ldoegorova := 38
Ldomoskovskogo := 150
lperehkr1 := 27
lperehmosc := 22
Ldometrootmosc := 38
Lmezdu := 11
V := 1.4
vkoefbeg := 2.5
Vmax := V*vkoefbeg
Tegorova := 75
Tkr1mosc := 119
Tgreenegor := 24
Tgreenmosc := 30
Tgreenkr1 := 28
Tredegor := Tegorova - Tgreenegor = 51
Tredmosckr1 := 5
Tredkr1mosc := Tkr1mosc - (Tgreenmosc + Tgreenkr1 + Tredmosckr1) = 56
Tbegegor := Tegorova - lperehkr1/Vmax = 67.2857
Tgreenboth := Tgreenmosc + Tgreenkr1 + Tredmosckr1 = 63
Tbegkr1 := Tgreenboth - lperehkr1/Vmax = 55.2857
Tbegmosc := Tgreenmosc - lperehmosc/Vmax = 23.7143
n := 10000
X :=
    for i ∈ 0 .. n - 1
        P1 ← rnd(Tegorova)
        P2 ← rnd(Tkr1mosc)
        T1 ← Ldoegorova/V
        tp1 ← T1 + P1
        if tp1 ≤ Tbegegor
            T1 ← Tegorova - P1
            if tp1 ≤ Tredegor
                tm ← Tgreenegor - lperehmosc/V
            else if Tredegor < tp1 ≤ (Tegorova - lperehkr1/V)
                tm ← Tgreenegor - lperehkr1/V - (tp1 - Tredegor)
        else
            T1 ← 2*Tegorova - P1
            if tp1 ≤ (Tegorova + Tredegor)
                tm ← Tgreenegor - lperehmosc/V
            else if (Tegorova + Tredegor) < tp1 ≤ (2*Tegorova - lperehkr1/V)
                tm ← Tgreenegor - lperehkr1/V - (tp1 - (Tegorova + Tredegor))
        T1 ← T1 - tm
        tm ← 0
        T1 ← T1 + (Ldoegorova + Ldomoskovskogo + 11)/V
        T2 ← Ldomoskovskogo/V
        tp2 ← T2 + P2
        if tp2 ≤ Tbegkr1
            T2 ← Tgreenboth - P2
        else if Tbegkr1 < tp2 ≤ (Tkr1mosc + Tbegkr1)
            T2 ← Tkr1mosc + Tgreenboth - P2
        else if (Tkr1mosc + Tbegkr1) < tp2 ≤ (2*Tkr1mosc + Tbegkr1)
            T2 ← 2*Tkr1mosc + Tgreenboth - P2
        else
            T2 ← 3*Tkr1mosc + Tgreenboth - P2
        T2 ← T2 + Tredkr1mosc
        tp3 ← T1 + P2
        if tp3 ≤ (Tkr1mosc + Tbegmosc)
            T1 ← Tkr1mosc + Tgreenmosc - P2
            if tp3 < Tkr1mosc
                tm ← Tgreenmosc - lperehmosc/V
            else if Tkr1mosc ≤ tp3 ≤ (Tkr1mosc + Tgreenmosc - lperehmosc/V)
                tm ← Tgreenmosc - lperehmosc/V - (tp3 - Tkr1mosc)
        else if (Tkr1mosc + Tbegmosc) < tp3 ≤ (2*Tkr1mosc + Tbegmosc)
            T1 ← 2*Tkr1mosc + Tgreenmosc - P2
            if tp3 < 2*Tkr1mosc
                tm ← Tgreenmosc - lperehmosc/V
            else if 2*Tkr1mosc ≤ tp3 ≤ (2*Tkr1mosc + Tgreenmosc - lperehmosc/V)
                tm ← Tgreenmosc - lperehmosc/V - (tp3 - 2*Tkr1mosc)
        else if (2*Tkr1mosc + Tbegmosc) < tp3 ≤ (3*Tkr1mosc + Tbegmosc)
            T1 ← 3*Tkr1mosc + Tgreenmosc - P2
            if tp3 < 3*Tkr1mosc
                tm ← Tgreenmosc - lperehmosc/V
            else if 3*Tkr1mosc ≤ tp3 ≤ (3*Tkr1mosc + Tgreenmosc - lperehmosc/V)
                tm ← Tgreenmosc - lperehmosc/V - (tp3 - 3*Tkr1mosc)
        else
            T1 ← 4*Tkr1mosc + Tgreenmosc - P2
            if tp3 < 4*Tkr1mosc
                tm ← Tgreenmosc - lperehmosc/V
            else if 4*Tkr1mosc ≤ tp3 ≤ (4*Tkr1mosc + Tgreenmosc - lperehmosc/V)
                tm ← Tgreenmosc - lperehmosc/V - (tp3 - 4*Tkr1mosc)
        T1 ← T1 - tm
        tm ← 0
        T2 ← T2 + lperehmosc/V
        T1 ← T1 + Ldometrootmosc/V
        T2 ← T2 + Ldometrootmosc/V
        Tegor[i] ← T1
        Tmosc[i] ← T2
    [Tegor, Tmosc]
Tegor := X[0, 0] = [
    287.293; 241.917; 346.707; 291.067; 303.057; 297.911; 238.953; 357.742
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]
Tmosc := X[0, 1] = [
    287.293; 241.917; 227.707; 291.067; 303.057; 297.911; 224.668; 238.742
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]
Tmoscsr := mean(Tmosc) = 273.237
Tmoscs := sort(Tmosc)
Tmoscmin := min(Tmosc) = 213.737
Tmoscmax := max(Tmosc) = 332.699
G2 := punif(Tmoscs, Tmoscmin, Tmoscmax)
# [plot: G2 vs Tmoscs]
t1 := qunif(0.025, Tmoscmin, Tmoscmax) = 216.711
t2 := qunif(0.975, Tmoscmin, Tmoscmax) = 329.725
kTmosc := 20
ΔTmosc := (Tmoscmax - Tmoscmin)/kTmosc = 5.9481
jTmosc := 0 .. kTmosc
tTmosc[jTmosc] := Tmoscmin + ΔTmosc*jTmosc
HTmosc := hist(tTmosc, Tmosc)
Diag2 := HTmosc/n
# [plot: Diag2 vs tTmosc]
pTmosc := HTmosc/n
Tegorsr := mean(Tegor) = 288.625
Tegors := sort(Tegor)
Tegormin := min(Tegor) = 211.257
s := sqrt(var(Tegor)) = 37.2039
Tegormax := max(Tegor) = 380.788
F1 := pnorm(Tegors, Tegorsr, s)
kTegor := 20
# [plot: F1 vs Tegors]
ΔTegor := (Tegormax - Tegormin)/kTegor = 8.47652
jTegor := 0 .. kTegor
tTegor[jTegor] := Tegormin + ΔTegor*jTegor
HTegor := hist(tTegor, Tegor)
pTegor := HTegor/n
Diag1 := HTegor/n
# [plot: Diag1 vs tTegor]
sTegor := sqrt(sum((Tegor[i - 1] - Tegorsr)^2, i = 1 .. n)/(n - 1)) = 37.2058
P := 0.95
α := 1 - P
t := qnorm(1 - α/2, 0, 1) = 1.95996
Tegortmax := Tegorsr + t*sTegor = 361.547
Tegortmin := Tegorsr - t*sTegor = 215.703
# [plot: pTegor, pTmosc vs tTegor, tTmosc]
